N1 := 9000
N2 := 9000
N3 := -14000
N4 := 26000
E := 2*10^11
A1 := 2.5*10^-4
A2 := 1.1*10^-4
A3 := 1.1*10^-4
A4 := 3.6*10^-4
l1 := 0.35
l2 := 0.25
l3 := 0.15
l4 := 0.5
dl1 := l1*N1/(E*A1)*1000 = 0.063
dl2 := l2*N2/(E*A2)*1000 = 0.102273
dl3 := l3*N3/(E*A3)*1000 = -0.0954545
dl4 := l4*N4/(E*A4)*1000 = 0.180556
