OA := 90
AB := 120
w := 4
t := 0, 0.01 .. 5
OH(x) := OA*cos(x)
C(x) := w*x
AH(x) := OA*sin(x)
HB(x) := sqrt(AB^2 - AH(x)^2)
B(x) := OH(x) + HB(x)
B(C(t)) = [
    210; 209.874; 209.496; 208.868; 207.991; 206.866; 205.498; 203.889; 202.044; 199.967
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]
# [plot: B(C(t)) (1) vs t (1)]
